# OpenSim document version 40000
InverseKinematicsTool:
  results_directory: ..\IK\
  model_file: unassigned
  constraint_weight: Inf
  accuracy: 1e-7
  marker_file: ..\data\Walking01.trc
  time_range: 0 4
  report_errors: true
  output_motion_file: ..\IK\Walking01.mot
  report_marker_locations: true
  IKTaskSet:
    IKMarkerTask T2: apply=true weight=5
    IKMarkerTask MANU: apply=true weight=5
    IKMarkerTask T10: apply=true weight=5
    IKMarkerTask LASI: apply=true weight=10
    IKMarkerTask RASI: apply=true weight=10
    IKMarkerTask SACR: apply=true weight=10
    IKMarkerTask LTHI: apply=true weight=3
    IKMarkerTask RTHI: apply=true weight=3
    IKMarkerTask LKNE: apply=true weight=5
    IKMarkerTask RKNE: apply=true weight=5
    IKMarkerTask LTIB: apply=true weight=3
    IKMarkerTask RTIB: apply=true weight=3
    IKMarkerTask LANK: apply=true weight=5
    IKMarkerTask RANK: apply=true weight=5
    IKMarkerTask LTOE: apply=true weight=5
    IKMarkerTask RTOE: apply=true weight=5
    IKMarkerTask LHEE: apply=true weight=5
    IKMarkerTask RHEE: apply=true weight=5
    IKMarkerTask RD1MH: apply=false weight=3
    IKMarkerTask RD5MH: apply=false weight=3
    IKMarkerTask RHJC: apply=false weight=1
    IKMarkerTask RKJC: apply=false weight=1
    IKMarkerTask RAJC: apply=false weight=1
    IKMarkerTask RMED: apply=false weight=1
    IKCoordinateTask mtp_angle_r: apply=true weight=1 value_type=default_value value=0
