# OpenSim document version 40000
ScaleTool Model_scaled:
  mass: 32.3 [kg]
  height: 1380
  age: 11
  ModelScaler:
    apply: true
    scaling_order: measurements
    marker_file: ../data/Static.trc
    time_range: 0 2.66
    preserve_mass_distribution: true
    output_scale_file: ../ScaleSet.xml
    MeasurementSet:
      Measurement pelvic_depth: apply=false
        MarkerPair: markers=(SACR LASI)
        MarkerPair: markers=(SACR RASI)
      Measurement pelvic_height: apply=true
        MarkerPair: markers=(LHJC LASI)
        MarkerPair: markers=(RHJC RASI)
        BodyScale pelvis: axes=Y
      Measurement pelvic_width: apply=true
        MarkerPair: markers=(LASI RASI)
        BodyScale pelvis: axes=(X Z)
      Measurement thigh_r: apply=true
        MarkerPair: markers=(RHJC RKJC)
        BodyScale femur_r: axes=(X Y Z)
      Measurement shank_r: apply=true
        MarkerPair: markers=(RKJC RAJC)
        BodyScale tibia_r: axes=(X Y Z)
      Measurement foot_length_r: apply=true
        MarkerPair: markers=(RHEE RTOE)
        BodyScale talus_r: axes=(X Y Z)
        BodyScale calcn_r: axes=(X Y Z)
        BodyScale toes_r: axes=(X Y Z)
      Measurement thigh_l: apply=true
        MarkerPair: markers=(LHJC LKJC)
        BodyScale femur_l: axes=(X Y Z)
      Measurement shank_l: apply=true
        MarkerPair: markers=(LKJC LAJC)
        BodyScale tibia_l: axes=(X Y Z)
      Measurement foot_length_l: apply=true
        MarkerPair: markers=(LHEE LTOE)
        BodyScale talus_l: axes=(X Y Z)
        BodyScale calcn_l: axes=(X Y Z)
        BodyScale toes_l: axes=(X Y Z)
      Measurement torso_yz: apply=true
        MarkerPair: markers=(T2 T10)
        BodyScale torso: axes=Y
      Measurement torso_xz: apply=true
        MarkerPair: markers=(T2 MANU)
        BodyScale torso: axes=(X Z)
  MarkerPlacer:
    apply: true
    marker_file: ../data/Static.trc
    time_range: 0 2.66
    output_motion_file: ../Static_trial.mot
    output_model_file: ../Scaled_simbody.osim
    output_marker_file: ../Marker_locations.sto
    max_marker_movement: -1
    IKTaskSet:
      IKMarkerTask T2: apply=true weight=5
      IKMarkerTask MANU: apply=true weight=5
      IKMarkerTask T10: apply=true weight=5
      IKMarkerTask LASI: apply=true weight=10
      IKMarkerTask RASI: apply=true weight=10
      IKMarkerTask SACR: apply=true weight=10
      IKMarkerTask LTHI: apply=true weight=3
      IKMarkerTask RTHI: apply=true weight=3
      IKMarkerTask LKNE: apply=true weight=10
      IKMarkerTask RKNE: apply=true weight=10
      IKMarkerTask LTIB: apply=true weight=3
      IKMarkerTask RTIB: apply=true weight=3
      IKMarkerTask LANK: apply=true weight=10
      IKMarkerTask RANK: apply=true weight=10
      IKMarkerTask LTOE: apply=true weight=5
      IKMarkerTask RTOE: apply=true weight=5
      IKMarkerTask LHEE: apply=true weight=5
      IKMarkerTask RHEE: apply=true weight=5
      IKMarkerTask LD1MH: apply=false weight=3
      IKMarkerTask RD1MH: apply=false weight=3
      IKMarkerTask LD5MH: apply=false weight=3
      IKMarkerTask RD5MH: apply=false weight=3
      IKMarkerTask LHJC: apply=true weight=5
      IKMarkerTask RHJC: apply=true weight=5
      IKMarkerTask LKJC: apply=true weight=5
      IKMarkerTask RKJC: apply=true weight=5
      IKMarkerTask LAJC: apply=true weight=5
      IKMarkerTask RAJC: apply=true weight=5
      IKMarkerTask RMED: apply=true weight=5
      IKMarkerTask LMED: apply=true weight=5
      IKCoordinateTask subtalar_angle_r: apply=false weight=5 value_type=default_value value=0
      IKCoordinateTask mtp_angle_r: apply=false weight=1 value_type=default_value value=0
      IKCoordinateTask subtalar_angle_l: apply=false weight=5 value_type=default_value value=0
      IKCoordinateTask mtp_angle_l: apply=false weight=1 value_type=default_value value=0
